# for robot1
R2 := 0.2
L1 := 0.1
k1 := 1
M1 := k1*L1 = 0.1
g = 9.80665 m/s^2
R3 := 0.525
L2 := 0.4
k2 := 1
M2 := k2*L2 = 0.4
R4 := 0.725
L3 := 0.25
k3 := 1
M3 := k3*L3 = 0.25
R5 := 0.875
L4 := 0.15
k4 := 1
M4 := k4*L4 = 0.15
R6 := 0.975
L5 := 0.15
k5 := 1
M5 := k5*L5 = 0.15
R7 := 1
L6 := 0.05
k6 := 1
M6 := k6*L6 = 0.05
k7 := 1
M7 := 5
To1 := M1*g + M2*g*R2 + M3*g*R3 + M4*g*R4 + M5*g*R5 + M6*g*R6 + M7*g*R7 = 54.9172 m/s^2
# for robot2
R2 := 0.3
L1 := 0.1
k1 := 1
M1 := k1*(L1 + L2) = 0.5
R3 := 0.6
L2 := 0.2
k2 := 1
M2 := k2*L3 = 0.25
R4 := 0.8
L3 := 0.6
k3 := 1
M3 := k3*L4 = 0.15
R5 := 1
L4 := 0.15
k4 := 1
M4 := k4*L5 = 0.15
L5 := 0.4
k5 := 1
M5 := k5*L6 + 5 = 5.05
L6 := 0.6
k6 := 1
k7 := 1
To1 := M1*g + M2*g*R2 + M3*g*R3 + M4*g*R4 + M5*g*R5 = 57.2218 m/s^2
# for robot3
R2 := 0.25
L1 := 1
k1 := 1
M1 := k1*L1 = 1
R3 := 0.5
L2 := 0.5
k2 := 1
M2 := k2*L2 = 0.5
R4 := 0.6
L3 := 0.2
k3 := 1
M3 := k3*L3 = 0.2
R5 := 0.8
L4 := 0.2
k4 := 1
M4 := k4*L4 = 0.2
R6 := 1
L5 := 0.2
k5 := 1
M5 := k5*L5 = 0.2
R7 := 1.1
k6 := 1
M6 := k6*L6 = 0.6
k7 := 1
M7 := 5
To1 := M1*g + M2*g*R2 + M3*g*R3 + M4*g*R4 + M5*g*R5 + M6*g*R6 + M7*g*R7 = 74.5796 m/s^2
